# OpenSim document version 40600
ScaleTool:
  mass: 75 [kg]
  height: -1
  age: -1
  GenericModelMaker:
    model_file: /Volumes/T31/opensim/fullbodylumbar/FBLSmodel.osim
  ModelScaler:
    apply: true
    scaling_order: measurements
    marker_file: /Users/choejaehyeog/3dgs_to_gart_textbook/.claude/worktrees/adoring-curie-b5a7b5/ik_subject1_set002/set_002.trc
    time_range: 0 0.5
    preserve_mass_distribution: false
    MeasurementSet:
      Measurement pelvis: apply=true
        MarkerPair: markers=(RASI LASI)
        BodyScale pelvis: axes=(X Y Z)
        BodyScale sacrum: axes=(X Y Z)
      Measurement shank_r: apply=true
        MarkerPair: markers=(RKNE RANK)
        BodyScale tibia_r: axes=(X Y Z)
        BodyScale patella_r: axes=(X Y Z)
      Measurement shank_l: apply=true
        MarkerPair: markers=(LKNE LANK)
        BodyScale tibia_l: axes=(X Y Z)
        BodyScale patella_l: axes=(X Y Z)
      Measurement foot_r: apply=true
        MarkerPair: markers=(RHEE RTOE)
        BodyScale talus_r: axes=(X Y Z)
        BodyScale calcn_r: axes=(X Y Z)
        BodyScale toes_r: axes=(X Y Z)
      Measurement foot_l: apply=true
        MarkerPair: markers=(LHEE LTOE)
        BodyScale talus_l: axes=(X Y Z)
        BodyScale calcn_l: axes=(X Y Z)
        BodyScale toes_l: axes=(X Y Z)
      Measurement humerus_r: apply=true
        MarkerPair: markers=(RSHO RELB)
        BodyScale humerus_r: axes=(X Y Z)
      Measurement humerus_l: apply=true
        MarkerPair: markers=(LSHO LELB)
        BodyScale humerus_l: axes=(X Y Z)
      Measurement forearm_r: apply=true
        MarkerPair: markers=(RELB RWRA)
        BodyScale ulna_r: axes=(X Y Z)
        BodyScale radius_r: axes=(X Y Z)
      Measurement forearm_l: apply=true
        MarkerPair: markers=(LELB LWRA)
        BodyScale ulna_l: axes=(X Y Z)
        BodyScale radius_l: axes=(X Y Z)
      Measurement hand_r: apply=true
        MarkerPair: markers=(RWRA RFIN)
        BodyScale hand_r: axes=(X Y Z)
      Measurement hand_l: apply=true
        MarkerPair: markers=(LWRA LFIN)
        BodyScale hand_l: axes=(X Y Z)
      Measurement torso: apply=true
        MarkerPair: markers=(C7 CLAV)
        BodyScale torso: axes=(X Y Z)
        BodyScale Abdomen: axes=(X Y Z)
        BodyScale lumbar1: axes=(X Y Z)
        BodyScale lumbar2: axes=(X Y Z)
        BodyScale lumbar3: axes=(X Y Z)
        BodyScale lumbar4: axes=(X Y Z)
        BodyScale lumbar5: axes=(X Y Z)
      Measurement thigh_r: apply=true
        MarkerPair: markers=(RASI RKNE)
        BodyScale femur_r: axes=(X Y Z)
      Measurement thigh_l: apply=true
        MarkerPair: markers=(LASI LKNE)
        BodyScale femur_l: axes=(X Y Z)
  MarkerPlacer:
    apply: true
    marker_file: /Users/choejaehyeog/3dgs_to_gart_textbook/.claude/worktrees/adoring-curie-b5a7b5/ik_subject1_set002/set_002.trc
    time_range: 0 0.5
    output_motion_file: /Users/choejaehyeog/3dgs_to_gart_textbook/.claude/worktrees/adoring-curie-b5a7b5/ik_subject1_set002_fbls/static_pose.mot
    output_model_file: /Users/choejaehyeog/3dgs_to_gart_textbook/.claude/worktrees/adoring-curie-b5a7b5/ik_subject1_set002_fbls/scaled_fbls.osim
    max_marker_movement: -1
